# Расчет таймера | Расчет преобразователя частота-напряжение
C := 1000*10^-6  # Ф
f20 := 7010  # Гц  # влажность 20%
# Опорное напряжение на компараторе = 7,584 В, что соответствует переходному процессу t
f30 := 6880  # Гц  # влажность 30%
# 30 минут
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f40 := 6760  # Гц  # влажность 40%
t[30] := 1800
f50 := 6650  # Гц  # влажность 50%
t[11] := t[30]/1 = 1800  # постоянная времени
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R2 := t[11]/C = 1800000  # Ом
# 1 час
t[60] := 3600
y := 1.89  # В  # Опорное напряжение микросхемы
t[111] := t[60]/1 = 3600  # постоянная времени
R27 := 100000  # Ом
C2 := 10*10^-9  # Ф
R3 := t[111]/C = 3600000  # Ом
R26 := 10000  # Ом
# 2 часа
Uвых20 := f20*y*(6810*C2*R27/R26) = 9.0225  # В
t[120] := 7200
Uвых30 := f30*y*(6810*C2*R27/R26) = 8.85518  # В
t[1111] := t[120]/1 = 7200  # постоянная времени
Uвых40 := f40*y*(6810*C2*R27/R26) = 8.70073  # В
R5 := t[1111]/C = 7200000  # Ом
# Опорный делитель на 7.584В
Uвых50 := f50*y*(6810*C2*R27/R26) = 8.55915  # В
Uпит := 12  # В
# Делители на компаратор влажности
R4 := 10000  # Ом
R12 := 10000  # Ом
U1 := 7.584  # В
q(R10) := -U1 + Uпит*R10/(R4 + R10)
q20(R13) := -Uвых20 + 12*R13/(R12 + R13)
q40(R15) := -Uвых40 + 12*R15/(R12 + R15)
q20(R13) solve → 30302.2791846
q(R10) solve → 17173.9130435  # Ом
q40(R15) solve → 26371.664582
# делитель для постоянной работы (5 положение)
q30(R14) := -Uвых30 + 12*R14/(R12 + R14)
q50(R16) := -Uвых50 + 12*R16/(R12 + R16)
R7 := 10000  # Ом
q30(R14) solve → 28157.9770777
q50(R16) solve → 24875.0883321
Q(R9) := -6 + Uпит*R9/(R7 + R9)
Q(R9) solve → 10000
